# OpenSim document version 30000
MarkerSet:
  Marker R_ASIS: pelvis (0.02 0.03 0.128)
  Marker L_ASIS: pelvis (0.02 0.03 -0.128)
  Marker L_PSIS: pelvis (-0.135 0.0728 -0.0611)
  Marker R_Thigh_Upper: femur_r (0.000730843 -0.221979 0.0640001)
  Marker R_Thigh_Front: femur_r (0.0418501 -0.288403 0.0665608)
  Marker R_Thigh_Rear: femur_r (-0.038726 -0.28797 0.0617349)
  Marker R_Knee_Lat: femur_r (0 -0.404 0.05)
  Marker R_Knee_Med: femur_r (0 -0.404 -0.05)
  Marker R_Shank_Upper: tibia_r (0.0089 -0.124 0.05)
  Marker R_Shank_Front: tibia_r (0.0353574 -0.177966 0.0403141)
  Marker R_Shank_Rear: tibia_r (-0.0256399 -0.175295 0.0478537)
  Marker R_Ankle_Lat: tibia_r (-0.005 -0.41 0.053)
  Marker R_Ankle_Med: tibia_r (0.006 -0.3888 -0.038)
  Marker R_Heel: calcn_r (-0.02 0.02 0)
  Marker R_Toe_Lat: calcn_r (0.144 0.0026 0.059)
  Marker R_Toe_Med: calcn_r (0.18 0.0067 -0.043) fixed=true
  Marker R_Toe_Tip: calcn_r (0.186 0.0182 -0.0222)
  Marker L_Thigh_Upper: femur_l (0.000730843 -0.221979 -0.0640001)
  Marker L_Thigh_Front: femur_l (0.0418501 -0.288403 -0.0665608)
  Marker L_Thigh_Rear: femur_l (-0.038726 -0.28797 -0.0617349)
  Marker L_Knee_Lat: femur_l (0 -0.404 -0.05)
  Marker L_Knee_Med: femur_l (0 -0.404 0.05)
  Marker L_Shank_Upper: tibia_l (0.0089 -0.124 -0.05)
  Marker L_Shank_Front: tibia_l (0.0353574 -0.177966 -0.0403141)
  Marker L_Shank_Rear: tibia_l (-0.0256399 -0.175295 -0.0478537)
  Marker L_Ankle_Lat: tibia_l (-0.005 -0.41 -0.053)
  Marker L_Ankle_Med: tibia_l (0.006 -0.3888 0.038)
  Marker L_Heel: calcn_l (-0.02 0.02 0)
  Marker L_Toe_Lat: calcn_l (0.144 0.0026 -0.059)
  Marker L_Toe_Med: calcn_l (0.18 0.0067 0.043)
  Marker L_Toe_Tip: calcn_l (0.186 0.0182 0.0222)
  Marker R_PSIS: pelvis (-0.135 0.0728 0.0611)
