# OpenSim document version 40000
ScaleTool ScaledSubject:
  mass: 75.1646 [kg]
  height: -1
  age: -1
  GenericModelMaker:
    model_file: KB_LowerBody.osim
    marker_set_file: KB_LowerBody_Markers.xml
  ModelScaler:
    apply: true
    scaling_order: measurements
    preserve_mass_distribution: true
    MeasurementSet gait2392:
      Measurement torso: apply=true
        MarkerPair: markers=(L_PSIS L_ASIS)
        MarkerPair: markers=(R_ASIS R_PSIS)
        MarkerPair: markers=(R_ASIS L_ASIS)
        MarkerPair: markers=(L_PSIS R_PSIS)
        BodyScale torso: axes=(X Y Z)
      Measurement pelvis: apply=true
        MarkerPair: markers=(R_ASIS L_ASIS)
        MarkerPair: markers=(L_PSIS R_PSIS)
        BodyScale pelvis: axes=(X Y Z)
      Measurement thigh: apply=false
        MarkerPair: markers=(R_ASIS R_Knee_Lat)
        MarkerPair: markers=(L_ASIS L_Knee_Lat)
      Measurement shank: apply=true
        MarkerPair: markers=(R_Knee_Lat R_Ankle_Lat)
        MarkerPair: markers=(L_Knee_Lat L_Ankle_Lat)
        BodyScale tibia_r: axes=(X Y Z)
        BodyScale talus_r: axes=(X Y Z)
        BodyScale tibia_l: axes=(X Y Z)
        BodyScale talus_l: axes=(X Y Z)
      Measurement foot: apply=true
        MarkerPair: markers=(R_Heel R_Toe_Tip)
        MarkerPair: markers=(L_Heel L_Toe_Tip)
        BodyScale calcn_r: axes=(X Y Z)
        BodyScale toes_r: axes=(X Y Z)
        BodyScale calcn_l: axes=(X Y Z)
        BodyScale toes_l: axes=(X Y Z)
      Measurement femur: apply=true
        MarkerPair: markers=(R_Thigh_Front R_Thigh_Upper)
        MarkerPair: markers=(R_Thigh_Front R_Thigh_Rear)
        MarkerPair: markers=(R_Thigh_Upper R_Thigh_Rear)
        MarkerPair: markers=(L_Thigh_Front L_Thigh_Upper)
        MarkerPair: markers=(L_Thigh_Front L_Thigh_Rear)
        MarkerPair: markers=(L_Thigh_Upper L_Thigh_Rear)
        BodyScale femur_r: axes=(X Y Z)
        BodyScale femur_l: axes=(X Y Z)
      Measurement tibia: apply=false
        MarkerPair: markers=(R_Shank_Upper R_Shank_Rear)
        MarkerPair: markers=(R_Shank_Upper R_Shank_Front)
        MarkerPair: markers=(R_Shank_Rear R_Shank_Front)
        MarkerPair: markers=(L_Shank_Upper L_Shank_Rear)
        MarkerPair: markers=(L_Shank_Upper L_Shank_Front)
        MarkerPair: markers=(L_Shank_Rear L_Shank_Front)
  MarkerPlacer:
    apply: true
    max_marker_movement: -1
    IKTaskSet gait2392_Scale:
      IKMarkerTask R_ASIS: apply=true weight=300
      IKMarkerTask L_ASIS: apply=true weight=300
      IKMarkerTask L_PSIS: apply=true weight=300
      IKMarkerTask R_Thigh_Upper: apply=true weight=1
      IKMarkerTask R_Thigh_Front: apply=true weight=1
      IKMarkerTask R_Thigh_Rear: apply=true weight=1
      IKMarkerTask R_Knee_Lat: apply=true weight=300
      IKMarkerTask R_Knee_Med: apply=true weight=300
      IKMarkerTask R_Shank_Upper: apply=true weight=1
      IKMarkerTask R_Shank_Front: apply=true weight=1
      IKMarkerTask R_Shank_Rear: apply=true weight=1
      IKMarkerTask R_Ankle_Lat: apply=true weight=300
      IKMarkerTask R_Ankle_Med: apply=true weight=300
      IKMarkerTask R_Heel: apply=true weight=300
      IKMarkerTask R_Toe_Lat: apply=true weight=1
      IKMarkerTask R_Toe_Med: apply=true weight=1
      IKMarkerTask R_Toe_Tip: apply=true weight=300
      IKMarkerTask L_Thigh_Upper: apply=true weight=1
      IKMarkerTask L_Thigh_Front: apply=true weight=1
      IKMarkerTask L_Thigh_Rear: apply=true weight=1
      IKMarkerTask L_Knee_Lat: apply=true weight=300
      IKMarkerTask L_Knee_Med: apply=true weight=300
      IKMarkerTask L_Shank_Upper: apply=true weight=1
      IKMarkerTask L_Shank_Front: apply=true weight=1
      IKMarkerTask L_Shank_Rear: apply=true weight=1
      IKMarkerTask L_Ankle_Lat: apply=true weight=300
      IKMarkerTask L_Ankle_Med: apply=true weight=300
      IKMarkerTask L_Heel: apply=true weight=300
      IKMarkerTask L_Toe_Lat: apply=true weight=1
      IKMarkerTask L_Toe_Med: apply=true weight=1
      IKMarkerTask L_Toe_Tip: apply=true weight=300
      IKMarkerTask R_PSIS: apply=true weight=300
      IKCoordinateTask [values shared by the 5 below unless stated]: apply=true weight=1000 value_type=default_value
          value=0
      IKCoordinateTask subtalar_angle_r
      IKCoordinateTask mtp_angle_r
      IKCoordinateTask subtalar_angle_l
      IKCoordinateTask mtp_angle_l
      IKCoordinateTask lumbar_extension: value_type=manual_value
